*Heading
** Job name: Job-HT_Cmodel_v41_invpy_33333_4-5-cond15 Model name: Model-HT
** Generated by: Abaqus/CAE 2023
*Preprint, echo=NO, model=NO, history=NO, contact=NO
**
** PARTS
**
*Part, name=Part-lpbf
*End Part
**
*Part, name=Part-substrate
*End Part
**
**
** ASSEMBLY
**
*Assembly, name=Assembly
**
*Instance, name=Part-lpbf-1, part=Part-lpbf
          5.,           5.,          0.3
*Node
      1,   4.80952358,   4.80952358, -0.300000012
      2,   4.32857132,   4.80952358, -0.300000012
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*Element, type=DC3D8
   1,  232,  233,  254,  253,    1,    2,   23,   22
   2,  233,  234,  255,  254,    2,    3,   24,   23
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*Nset, nset=Set-lpbf, generate
    1,  4851,     1
*Elset, elset=Set-lpbf, generate
    1,  4000,     1
*Elset, elset=_Surf-lpbf_bottom_S3, internal
    1,    2,    3,    4,    5,    6
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*Surface, type=ELEMENT, name=Surf-lpbf_bottom
_Surf-lpbf_bottom_S3, S3
** Section: Section-HX
*Solid Section, elset=Set-lpbf, material=Material-HX
,
*End Instance
**
*Instance, name=Part-substrate-1, part=Part-substrate
          5.,           5.,          0.3
*Node
      1,   2.90476179,  -2.90476179,  -3.29999995
      2,   2.61428571,  -2.90476179,  -3.29999995
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*Element, type=DC3D8
   1,  106,  107,  128,  127,    1,    2,   23,   22
   2,  107,  108,  129,  128,    2,    3,   24,   23
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*Nset, nset=Set-substrate, generate
    1,  9702,     1
*Elset, elset=Set-substrate, generate
    1,  8400,     1
*Nset, nset=Set-substrate_bottom
   85,   86,   87,   88,   89,   90
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*Elset, elset=Set-substrate_bottom
   61,   62,   63,   64,   65,   66
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*Elset, elset=_Surf-substrate_bottom_S5, internal
   61,   62,   63,   64,   65,   66
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*Surface, type=ELEMENT, name=Surf-substrate_bottom
_Surf-substrate_bottom_S5, S5
*Elset, elset=_Surf-substrate_top_S5, internal
 4581, 4582, 4583, 4584, 4585, 4586
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*Surface, type=ELEMENT, name=Surf-substrate_top
_Surf-substrate_top_S5, S5
** Section: Section-HX
*Solid Section, elset=Set-substrate, material=Material-HX
,
*End Instance
**
*Nset, nset=Set-all, instance=Part-lpbf-1, generate
    1,  4851,     1
*Nset, nset=Set-all, instance=Part-substrate-1, generate
    1,  9702,     1
*Elset, elset=Set-all, instance=Part-lpbf-1, generate
    1,  4000,     1
*Elset, elset=Set-all, instance=Part-substrate-1, generate
    1,  8400,     1
*Elset, elset=Set-layer1, instance=Part-lpbf-1
    1,    2,    3,    4,    5,    6
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*Elset, elset=Set-layer2, instance=Part-lpbf-1
   21,   22,   23,   24,   25,   26
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*Elset, elset=Set-layer3, instance=Part-lpbf-1
   41,   42,   43,   44,   45,   46
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*Elset, elset=Set-layer4, instance=Part-lpbf-1
   61,   62,   63,   64,   65,   66
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*Elset, elset=Set-layer5, instance=Part-lpbf-1
   81,   82,   83,   84,   85,   86
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*Elset, elset=Set-layer6, instance=Part-lpbf-1
  101,  102,  103,  104,  105,  106
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*Elset, elset=Set-layer7, instance=Part-lpbf-1
  121,  122,  123,  124,  125,  126
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*Elset, elset=Set-layer8, instance=Part-lpbf-1
  141,  142,  143,  144,  145,  146
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*Elset, elset=Set-layer9, instance=Part-lpbf-1
  161,  162,  163,  164,  165,  166
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*Elset, elset=Set-layer10, instance=Part-lpbf-1
  181,  182,  183,  184,  185,  186
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** Constraint: Constraint-Tie_lpbf_substrate
*Tie, name=Constraint-Tie_lpbf_substrate, adjust=yes
Part-substrate-1.Surf-substrate_top, Part-lpbf-1.Surf-lpbf_bottom
*Element Progressive Activation, name=ElementProgressiveActivation1, elset=Part-lpbf-1.Set-lpbf
*End Assembly
*Amplitude, name=Amp-layer1, time=TOTAL TIME
        4.67908,              0.,         4.67918,              1.,         4.68008,              1.,         4.68018,              0.
*Amplitude, name=Amp-layer2, time=TOTAL TIME
        7.97704,              0.,         7.97714,              1.,         7.97804,              1.,         7.97814,              0.
*Amplitude, name=Amp-layer3, time=TOTAL TIME
       12.53728,              0.,        12.53738,              1.,        12.53828,              1.,        12.53838,              0.
*Amplitude, name=Amp-layer4, time=TOTAL TIME
        17.2716,              0.,         17.2717,              1.,         17.2726,              1.,         17.2727,              0.
*Amplitude, name=Amp-layer5, time=TOTAL TIME
       22.00799,              0.,        22.00809,              1.,        22.00899,              1.,        22.00909,              0.
*Amplitude, name=Amp-layer6, time=TOTAL TIME
       26.82251,              0.,        26.82261,              1.,        26.82351,              1.,        26.82361,              0.
*Amplitude, name=Amp-layer7, time=TOTAL TIME
       31.50203,              0.,        31.50213,              1.,        31.50303,              1.,        31.50313,              0.
*Amplitude, name=Amp-layer8, time=TOTAL TIME
       36.32279,              0.,        36.32289,              1.,        36.32379,              1.,        36.32389,              0.
*Amplitude, name=Amp-layer9, time=TOTAL TIME
       40.88242,              0.,        40.88252,              1.,        40.88342,              1.,        40.88352,              0.
*Amplitude, name=Amp-layer10, time=TOTAL TIME
       45.55777,              0.,        45.55787,              1.,        45.55877,              1.,        45.55887,              0.
**
** MATERIALS
**
*Material, name=Material-HX
*Conductivity
 0.0286,
*Density
 4.09e-06,
*Specific Heat
1130.,
*Time Points, name=TimePoints-4phases, GENERATE
0., 4.67908, 1.
4.67908, 4.68908, 0.001
4.68908, 6.67908, 0.01
6.67908, 7.97704, 1.
7.97704, 7.98704, 0.001
7.98704, 9.97704, 0.01
9.97704, 12.5373, 1.
12.5373, 12.5473, 0.001
12.5473, 14.5373, 0.01
14.5373, 17.2716, 1.
17.2716, 17.2816, 0.001
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47.5578, 50.1078, 1.
**
** PHYSICAL CONSTANTS
**
*Physical Constants, absolute zero=-273.15, stefan boltzmann=5.67e-14
*Parameter table type, name="ABQ_AM_MaterialDeposition", parameters=2
STRING,,"Event series",,,
STRING,,"Deposition process",,"Roller|Bead"
*Parameter table type, name="ABQ_AM_MaterialDeposition_Advanced", parameters=6
STRING,"Partial","Activation type",,"Full|Partial"
FLOAT,0.,"Min volume fraction threshold for partial activation",,,
FLOAT,0.,"Max volume fraction threshold for partial activation",,,
FLOAT,0.,"Max volume fraction threshold for full activation",,,
STRING,"Yes","Orientation for bead type deposition",,,
INTEGER,0,"Element subdivision order",,,
*Parameter table type, name="ABQ_AM_MaterialDeposition_Bead", parameters=5
STRING,,"Stack direction",,"X|Y|Z"
FLOAT,0.,"Bead height",,,
FLOAT,0.,"Bead width",,,
FLOAT,0.,"Activation offset",,,
STRING,,"Deposition position",,"Below|Above"
*Parameter table type, name="ABQ_AM_MovingHeatSource", parameters=2
STRING,,"Event series",,,
STRING,,"Energy distribution",,"Concentrated|Uniform|Goldak"
*Parameter table type, name="ABQ_AM_MovingHeatSource_Advanced", parameters=7
STRING,"False","Enhance energy conservation",,"True|False"
STRING,"False","Control increment size",,"True|False"
STRING,"Relative","Offset type",,"Absolute|Relative"
FLOAT,0.,"Vector x",,,
FLOAT,0.,"Vector y",,,
FLOAT,-1.,"Vector z",,,
FLOAT,1.,"Field factor",,,
*Parameter table type, name="ABQ_AM_MovingHeatSource_Goldak", parameters=10
INTEGER,0,"Subdiv x",,,
INTEGER,0,"Subdiv y",,,
INTEGER,0,"Subdiv z",,,
FLOAT,0.,"a",,,
FLOAT,0.,"b",,,
FLOAT,0.,"cf",,,
FLOAT,0.,"cr",,,
FLOAT,0.,"ff",,,
FLOAT,0.,"fr",,,
FLOAT,0.,"Box size factor",,,
*Parameter table type, name="ABQ_AM_MovingHeatSource_Uniform", parameters=9
INTEGER,0,"Subdiv x",,,
INTEGER,0,"Subdiv y",,,
INTEGER,0,"Subdiv z",,,
FLOAT,0.,"Offset x",,,
FLOAT,0.,"Offset y",,,
FLOAT,0.,"Offset z",,,
FLOAT,0.,"Box length x",,,
FLOAT,0.,"Box length y",,,
FLOAT,0.,"Box length z",,,
*Property table type, name="ABQ_AM_AbsorptionCoeff", properties=1
"Absorption Coefficient"
*Table collection, name="ABQ_AM.Material Input"
*Parameter Table, type="ABQ_AM_MaterialDeposition" ,label="ABQ_AM_MaterialDeposition"
"Event series-roller", Roller
*Parameter Table, type="ABQ_AM_MaterialDeposition_Advanced" ,label="ABQ_AM_MaterialDeposition_Advanced"
Full, 0., 0., 0.9, Yes, 0
*Parameter Table, type="ABQ_AM_MaterialDeposition_Bead" ,label="ABQ_AM_MaterialDeposition_Bead"
X, 0., 0., 0., Below
*Table collection, name="ABQ_AM.Moving Heat Source"
*Parameter Table, type="ABQ_AM_MovingHeatSource" ,label="ABQ_AM_MovingHeatSource"
"Event series-laser_layer", Uniform
*Parameter Table, type="ABQ_AM_MovingHeatSource_Advanced" ,label="ABQ_AM_MovingHeatSource_Advanced"
False, False, Relative, 0., 0., -1., 1.
*Parameter Table, type="ABQ_AM_MovingHeatSource_Goldak" ,label="ABQ_AM_MovingHeatSource_Goldak"
0, 0, 0, 0., 0., 0., 0., 0., 0., 0.
*Parameter Table, type="ABQ_AM_MovingHeatSource_Uniform" ,label="ABQ_AM_MovingHeatSource_Uniform"
0, 0, 0, 0., 0., 0., 15., 15., 0.03
*Property table, type="ABQ_AM_AbsorptionCoeff", label="ABQ_AM_AbsorptionCoeff"
0.7
**
** PREDEFINED FIELDS
**
** Name: Predefined Field-1   Type: Temperature
*Initial Conditions, type=TEMPERATURE
Set-all, 25.
**
** EVENT SERIES TYPE
**
*Event series type, name="ABQ_AM_HeatSourceTrajectory_RuleID", fields=1
"Rule ID"
**
** EVENT SERIES TYPE
**
*Event series type, name="ABQ_AM_MaterialDeposition", fields=1
"On/Off State"
**
** EVENT SERIES TYPE
**
*Event series type, name="ABQ_AM_PowerMagnitude", fields=1
"Power Magnitude (unit of JT^-1)"
**
** EVENT SERIES DATA
**
*Event series, name="Event series-laser_layer", type="ABQ_AM_PowerMagnitude"
4.5,4.5,5.,0.03,450000.
4.501,5.5,5.,0.03,0.
9.05,4.5,5.,0.06,450000.
9.051,5.5,5.,0.06,0.
13.6,4.5,5.,0.09,450000.
13.601,5.5,5.,0.09,0.
18.15,4.5,5.,0.12,450000.
18.151,5.5,5.,0.12,0.
22.7,4.5,5.,0.15,450000.
22.701,5.5,5.,0.15,0.
27.25,4.5,5.,0.18,450000.
27.251,5.5,5.,0.18,0.
31.8,4.5,5.,0.21,450000.
31.801,5.5,5.,0.21,0.
36.35,4.5,5.,0.24,450000.
36.351,5.5,5.,0.24,0.
40.9,4.5,5.,0.27,450000.
40.901,5.5,5.,0.27,0.
45.45,4.5,5.,0.3,450000.
45.451,5.5,5.,0.3,0.
**
** EVENT SERIES DATA
**
*Event series, name="Event series-roller", type="ABQ_AM_MaterialDeposition"
1.67908,-1.,0.,0.03,1.
4.67908,11.,0.,0.03,0.
4.97704,-1.,0.,0.06,1.
7.97704,11.,0.,0.06,0.
9.53728,-1.,0.,0.09,1.
12.5373,11.,0.,0.09,0.
14.2716,-1.,0.,0.12,1.
17.2716,11.,0.,0.12,0.
19.008,-1.,0.,0.15,1.
22.008,11.,0.,0.15,0.
23.8225,-1.,0.,0.18,1.
26.8225,11.,0.,0.18,0.
28.502,-1.,0.,0.21,1.
31.502,11.,0.,0.21,0.
33.3228,-1.,0.,0.24,1.
36.3228,11.,0.,0.24,0.
37.8824,-1.,0.,0.27,1.
40.8824,11.,0.,0.27,0.
42.5578,-1.,0.,0.3,1.
45.5578,11.,0.,0.3,0.
** ----------------------------------------------------------------
**
** STEP: Step-heating
**
*Step, name=Step-heating, nlgeom=NO, inc=100000
*Heat Transfer, end=PERIOD, deltmx=500.
0.001, 120., 1e-06, 1.,
**
** BOUNDARY CONDITIONS
**
** Name: BC-buildplateT Type: Temperature
*Boundary
Part-substrate-1.Set-substrate_bottom, 11, 11, 25.
**
** LOADS
**
** Name: Load-layer1   Type: Body heat flux
*Dflux, amplitude=Amp-layer1
Set-layer1, BF, 33333.
** Name: Load-layer2   Type: Body heat flux
*Dflux, amplitude=Amp-layer2
Set-layer2, BF, 33333.
** Name: Load-layer3   Type: Body heat flux
*Dflux, amplitude=Amp-layer3
Set-layer3, BF, 33333.
** Name: Load-layer4   Type: Body heat flux
*Dflux, amplitude=Amp-layer4
Set-layer4, BF, 33333.
** Name: Load-layer5   Type: Body heat flux
*Dflux, amplitude=Amp-layer5
Set-layer5, BF, 33333.
** Name: Load-layer6   Type: Body heat flux
*Dflux, amplitude=Amp-layer6
Set-layer6, BF, 33333.
** Name: Load-layer7   Type: Body heat flux
*Dflux, amplitude=Amp-layer7
Set-layer7, BF, 33333.
** Name: Load-layer8   Type: Body heat flux
*Dflux, amplitude=Amp-layer8
Set-layer8, BF, 33333.
** Name: Load-layer9   Type: Body heat flux
*Dflux, amplitude=Amp-layer9
Set-layer9, BF, 33333.
** Name: Load-layer10   Type: Body heat flux
*Dflux, amplitude=Amp-layer10
Set-layer10, BF, 33333.
**
** INTERACTIONS
**
** Interaction: Int-Conv
*Film
Set-all, FFS, 25., 2.0e-05
** Interaction: Int-Rad
*Radiate
Set-all, RFS, 25., 0.
**
** OUTPUT REQUESTS
**
*Restart, write, frequency=0
**
** FIELD OUTPUT: F-Output-1
**
*Output, field, time points=TimePoints-4phases
*Node Output
NT,
*Output, history, frequency=0
*Activate elements, activation=ElementProgressiveActivation1, expansion time constant=2.
"ABQ_AM.Material Input"
*End Step
